! Sample input file the BEM program
!
! all the nodes are defined in the node files
! first column is integer that is node id
! remaining columns are for coordinates

*model,id=1, name=model1, dim=3

*node
      1,        -100.,        -100.,           0.
      2,         -90.,        -100.,           0.
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

*element, eltype=3dtry4
1,   1,   2,  23,  22
  2,   2,   3,  24,  23
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

*nset, name=bnode2, generate
1, 441, 1

*elset, name = bel2, generate
1, 400, 1

*material, name = rock
*density
2000.
*elastic
3.e+7, 0.33

*material, name= soil
*density
2000.
*elastic
289636168.948, 0.33

*bemchunk, name = chunk1, bound = semiinfinite, element = bel2, bnode = bnode2, material = soil

! creating computational steps now
*step, type = frequency3
5.83325, 5.83325, 1
